// SBML level 2 version 4

model model01()
  // model

  // Compartments:
  compartment compartment_0000001 = 1 volume; compartment_0000001 is "default";

  // Species:
  species S1 in compartment_0000001 = 0;
  species S2 in compartment_0000001 = 0;

  // Parameters:
  F = 0.043 dimensionless;
  k = 0.065 dimensionless;
  k_one = 1 rate;
  u = 1e7 density;

  // Reactions:
  reaction_0000001: => S1; F*k_one*u^3;
  reaction_0000002: S1 => ; F*k_one*u^2;
  reaction_0000003: S1 + 2 S2 => 3 S2; k_one*1;
  reaction_0000004: S2 => ; (k + F)*k_one*u^2;

  // Unit definitions:
  unit rate = 1 / second;
  unit density = 1 / metre^3;
end
